# Beam end moment balancer based on Cross' method
#
# # Copyright (c) 2015 Antti Harri <iku@openbsd.fi>
# #
# # Permission to use, copy, modify, and distribute this software for any
# # purpose with or without fee is hereby granted, provided that the above
# # copyright notice and this permission notice appear in all copies.
# #
# # THE SOFTWARE IS PROVIDED "AS IS" AND THE AUTHOR DISCLAIMS ALL WARRANTIES
# # WITH REGARD TO THIS SOFTWARE INCLUDING ALL IMPLIED WARRANTIES OF
# # MERCHANTABILITY AND FITNESS. IN NO EVENT SHALL THE AUTHOR BE LIABLE FOR
# # ANY SPECIAL, DIRECT, INDIRECT, OR CONSEQUENTIAL DAMAGES OR ANY DAMAGES
# # WHATSOEVER RESULTING FROM LOSS OF USE, DATA OR PROFITS, WHETHER IN AN
# # ACTION OF CONTRACT, NEGLIGENCE OR OTHER TORTIOUS ACTION, ARISING OUT OF
# # OR IN CONNECTION WITH THE USE OR PERFORMANCE OF THIS SOFTWARE.
PRECISION := 0.000001 kNm
kNm ≡ kN*m
NoUnit ≡ 1
r := 0 .. 5
c := 0 .. 5
corners[r, c] := [0*NoUnit, 0*NoUnit, 0 kNm]
corners[2, 3] := [0*NoUnit, 1.00*NoUnit, -0.178 kNm]
corners[3, 2] := [0*NoUnit, 0.71512*NoUnit, 0.456 kNm]
corners[3, 4] := [0.5*NoUnit, 0.28488*NoUnit, -4.069 kNm]
corners[4, 3] := [0.5*NoUnit, 0.28488*NoUnit, 4.069 kNm]
corners[4, 5] := [0*NoUnit, 0.71512*NoUnit, -0.456 kNm]
corners[5, 4] := [0*NoUnit, 1.00*NoUnit, -0.178 kNm]
corners = [
    [0, 0, 0 J], [0, 0, 0 J], [0, 0, 0 J], [0, 0, 0 J], [0, 0, 0 J], [0, 0, 0 J];
    [0, 0, 0 J], [0, 0, 0 J], [0, 0, 0 J], [0, 0, 0 J], [0, 0, 0 J], [0, 0, 0 J];
    [0, 0, 0 J], [0, 0, 0 J], [0, 0, 0 J], [0, 1, -178 J], [0, 0, 0 J], [0, 0, 0 J];
    [0, 0, 0 J], [0, 0, 0 J], [0, 0.71512, 456 J], [0, 0, 0 J], [0.5, 0.28488, -4069 J], [0, 0, 0 J];
    [0, 0, 0 J], [0, 0, 0 J], [0, 0, 0 J], [0.5, 0.28488, 4069 J], [0, 0, 0 J], [0, 0.71512, -456 J];
    [0, 0, 0 J], [0, 0, 0 J], [0, 0, 0 J], [0, 0, 0 J], [0, 1, -178 J], [0, 0, 0 J]
]
# Debug: this should show
# [1 x 3] cells only.
cross(corners) :=
    while 1
        "Reset"
        high_crn ← 0
        high_blc ← false
        "Find the corner with the highest imbalance"
        for corner ∈ 0 .. rows(corners) - 1
            balance ← sum(corners[corner, j][0, 2], j = 0 .. cols(corners) - 1)
            if abs(high_blc) < abs(balance)
                high_crn ← corner
                high_blc ← balance
        "We have iterated long enough, return results"
        if abs(high_blc) ≤ PRECISION
            return corners
        "Get the row with to be balanced"
        beam_ends ← corners[high_crn, :]
        "Balance and xfer to another cells"
        for beam_end ∈ 0 .. cols(beam_ends) - 1
            data ← beam_ends[0, beam_end]
            "Balance diff * divisor * -1"
            i ← high_blc*data[0, 1]*(-1)
            "Add to the corner we are working on"
            corners[high_crn, beam_end][0, 2] ← i + corners[high_crn, beam_end][0, 2]
            "If xfer cell is not zero then add to the other end of the truss"
            i ← i*data[0, 0]
            corners[beam_end, high_crn][0, 2] ← i + corners[beam_end, high_crn][0, 2]
corners := cross(corners)
corners[2, 3] =  # error: This variable is undefined. Check that the label is set correctly.
corners[3, 2] =  # error
corners[3, 4] =  # error
corners[4, 3] =  # error
corners[4, 5] =  # error
corners[5, 4] =  # error
